# Motorok
I_fazis := 1.68 A
V_fazis := 3.4 V
α_motor := 0.9 deg
5 m*sin(0.1 deg) = 0.872664 cm
# Fogaskerekek
# 22402-1100021
z_1 := 21
D_01 := 23 mm
D_11 := 21 mm
D_21 := 5 mm
B_1 := 6 mm
L_1 := 17 mm
# 22402-1100060
z_2 := 60
D_02 := 62 mm
D_12 := 60 mm
D_22 := 8 mm
B_2 := 9 mm
L_2 := 18 mm
# 22402-1100036
z_3 := 36
D_03 := 38 mm
D_13 := 36 mm
D_23 := 8 mm
B_3 := 9 mm
L_3 := 18 mm
# 22402-1100110
z_4 := 110
D_04 := 112 mm
D_14 := 110 mm
D_24 := 12 mm
B_4 := 9 mm
L_4 := 18 mm
i_1 := z_2/z_1 = 2.85714
i_2 := z_4/z_3 = 3.05556
i := i_1*i_2 = 8.73016
α_torony := α_motor/i = 0.103091 deg
# Tévedés 5 méteren: | Tévedés 10 méteren:
5 m*sin(α_torony/2) = 0.449819 cm
10 m*sin(α_torony/2) = 0.899638 cm
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# TPS5430DDAR
# 3V3
F_SW := 500 kHz  # 7V4
C_1_A := 10 μF
# X5R vagy X7R
C_1_B := 10 μF
I_OUT_MAX := 2 A
I_OUT_MAX_B := 2 A
V_IN := 12 V
V_OUT_MAX := 7.4 A
V_OUT := 7.4 V
V_IN_MAX := 7.4 A
L_MIN_A := V_OUT_MAX*(V_IN_MAX - V_OUT)/(V_IN_MAX*K_IND*I_OUT*F_SW)  # error: This variable is undefined. Check that the label is set correctly.
